#--------------------- (2) Initialization ---------------------
units   lj # Lennard-Jones units.
dimension   3 # 3 dimensional simulation.
boundary    p p p # Periodic (p) in all directions
atom_style  bond

#--------------------- (3) Neighbor Lists ---------------------
neighbor        0.2 bin
neigh_modify    every 1 delay 0 check yes page 200000

#--------------------- (4) Processors Communications ---------------------

#--------------------- (5) Atom Definition ---------------------

#---------- Read input file ----------
read_data  chain.100_looping.data

#---------- Reshape simulation box/Define simulation box   ----------
change_box  all x final -${l} ${l} y final -${l} ${l} z final -${l} ${l} boundary p p p units box
region  cubicshell block INF INF INF INF INF INF units box

#---------- Create atoms ----------
variable    randseed equal ${i}+1000
create_atoms 3 random ${n_crowd} ${randseed} cubicshell units box

#---------- Group atoms ----------
group   bug_small type 1
group   bug_large type 2
group	bug type 1 2
group   crowd type 3

#---------- Define atoms masses ----------
mass 1 1.0
mass 2 ${mass2}
mass 3 1.0

#---------- Set velocity of the chain ----------
#----- Define a temperature compute for the chain -----
compute mobile bug temp

#----- Set velocity for the chain -----
velocity   bug create 1.0 ${randseed} temp mobile

#--------------------- (6) Interatomic/molecular Potential ---------------------
#---------- Lennard-Jones potential among all particles ----------
#---------- (6-a) Variables ----------
variable sig1 equal 1.0
variable sig2 equal ${sig2}
variable sig12 equal (${sig1}+${sig2})/2
variable sig13 equal (${sig1}+${sig3})/2
variable sig23 equal (${sig2}+${sig3})/2

variable cutoff11 equal ${sig1}*1.12246205
variable cutoff12 equal ((${sig1}+${sig2})/2.0)*1.12246205
variable cutoff22 equal ${sig2}*1.12246205
variable cutoff13 equal ((${sig1}+${sig3})/2.0)*1.12246205
variable cutoff23 equal ((${sig2}+${sig3})/2.0)*1.12246205
variable cutoff33 equal ${sig3}*1.12246205

pair_style      lj/cut 1.12246205

#Pair coefficient:   type-i  type-j (i should always be smaller than j) epsilon=1 sigma=(a_i+a_j)/2   cutoff=((sig_i+sig_j)/2)*2^(1/6)
pair_coeff      1 1 1.0 ${sig1}  ${cutoff11}
pair_coeff      1 2 1.0 ${sig12} ${cutoff12}
pair_coeff      2 2 1.0 ${sig2}  ${cutoff22}
pair_coeff      1 3 1.0 ${sig13}  ${cutoff13}
pair_coeff      2 3 1.0 ${sig23}  ${cutoff23}
pair_coeff      3 3 1.0 ${sig3}  ${cutoff33}

#---------- FENE potential among the chain's monomers ----------
# The FENE potential only exist among the monomers consisting the chain
variable    sig11_fene equal 1.5*${sig1}
variable    sig12_fene equal 1.5*${sig1}*(${sig12}/${sig1})
variable    k11_fene equal  30/(${sig1}*${sig1})
variable    k12_fene equal  (30/(${sig1}*${sig1}))*((${sig1}/${sig12})^2)

bond_style  fene

#Bond coefficient:  type-i  K=(30*epsilon)/((a_i+a_j)^2)   R_0=1.5*((a_i+a_j)/2 )   epsilon=1    sigma=(a_i+a_j)/2
bond_coeff  1 ${k11_fene}  ${sig11_fene}    1.0 ${sig1}
bond_coeff  2 ${k12_fene}  ${sig12_fene}    1.0 ${sig12}

#---------- Weighting coefficient for bonded atoms with pairwise interactions (Example,LJ interaction of two monomers in a chain) ----------
special_bonds   fene

#--------------------- (7) Settings ---------------------
#---------- Equilibration/Method of integration of equation of motion ----------
#Microcanonical ensamble:
fix     F_nve all nve/limit 0.01
#Brownian dynamics for all particles
fix     F_langevin all langevin 1.0 1.0 10.0 ${randseed}

fix     F_recenter bug recenter 0.0 0.0 0.0 shift all units box

#--------------------- (8) Run a simulation ---------------------

#---------- Equilibration run ----------
timestep 0.01
thermo 10000
run 10000000
write_restart    ./restart_before.i${i}

#Wiping out commands
unfix F_nve
unfix F_recenter

#---------- After equilibration (Data gathering run)
fix	F_nve all nve
fix	F_recenter bug recenter 0.0 0.0 0.0 shift all units box

timestep    ${run_dt}

dump	 D_bug bug atom  ${bug_dump} bug.i${i}.lammpstrj
dump_modify D_bug scale no
variable fname string input.lmp
variable j loop 10 pad #Having 10  roughly 7GB-size dump files padding with 2
	label dump_loop
	dump	 D_all all atom ${all_dump} all.i${i}.j${j}.lammpstrj.gz
	dump_modify D_all scale no pad 2
	restart 1000000  ./restarts/restart.${i}
	run	5000000
	undump D_all
	next j
	jump ${fname} dump_loop # input.lmp is the input script itself to prevent any issues related to stdin and SELF.
#After this loop, the systems evolves 5.1*10E7 timesteps
undump D_bug
write_data all.n${n_bug}.nc${n_crowd}.data
write_restart    ./restart_after.i${i}
